*Heading
** Job name: Job-fiber Model name: Model-1
** Generated by: Abaqus/CAE 2020.HF1
*Preprint, echo=NO, model=NO, history=NO, contact=NO
**
** PARTS
**
*Part, name=Part-1
*Node
      1,  0.400000006,          0.5
      2,  0.400000006,           0.
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*Element, type=CPE4
   1,    1,   19, 1711,  254
   2,   19,   20, 1712, 1711
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*Nset, nset=Set-1
    14,    15,    16,    17,   974,   975
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*Elset, elset=Set-1, generate
 37838,  47736,      1
*Nset, nset=Set-2, generate
     1,  38395,      1
*Elset, elset=Set-2, generate
     1,  37837,      1
** Section: Section-matrix
*Solid Section, elset=Set-2, material=Material-matrix
,
** Section: Section-fiber
*Solid Section, elset=Set-1, material=Material-Fiber
,
***************************************************************
*User element, nodes=4, type=U1, properties=3, coordinates=2, Variables=12
4
*Element, type=U1, elset=Phase-matrix
100001,1,19,1711,254
100002,19,20,1712,1711
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*Uel property, elset=Phase-matrix
0.025, 0.25, 1.0
*************************************************
*End Part
**
**
** ASSEMBLY
**
*Assembly, name=Assembly
**
*Instance, name=Part-1-1, part=Part-1
*End Instance
**
*Nset, nset=Set-Nodamage, instance=Part-1-1
    1,    2,    3,    4,    5,    6
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*Elset, elset=Set-Nodamage, instance=Part-1-1, generate
    1,  8000,     1
*Nset, nset=Set-interface, instance=Part-1-1
   14,   15,   16,   17,  974,  975
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*Elset, elset=Set-interface, instance=Part-1-1
  8343,  8344,  8345,  8346,  8347,  8349
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*Nset, nset=Set-left, instance=Part-1-1
   9,  10,  12, 590, 591, 592
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*Elset, elset=Set-left, instance=Part-1-1
 5901, 5902, 5903, 5904, 5905, 5906
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*Nset, nset=Set-leftm, instance=Part-1-1
 10,
*Nset, nset=Set-right, instance=Part-1-1
   3,   4,   6, 137, 138, 139
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*Elset, elset=Set-right, instance=Part-1-1
 1901, 1902, 1903, 1904, 1905, 1906
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*Nset, nset=Set-leftdown, instance=Part-1-1
 12,
*End Assembly
**
** MATERIALS
** Elastic properties for umatelem UMAT
**
** MATERIALS
**
*Material, name=Material-fiber
*Elastic
40000.0, 0.33
*Material, name=Material-matrix
*Depvar
     22,
*User Material, constants=2
4000.0, 0.4
**
**
***************************************************************
** STEP: Step-1
**
*Step, name=Step-1, nlgeom=YES, extrapolation=NO, inc=200000
***Static, direct
*Static, direct=NO STOP
1.0, 1.,
** BOUNDARY CONDITIONS
**
*Boundary
Set-interface, 4, 4, 1.0
**
** OUTPUT REQUESTS
**
*Restart, write, frequency=0
**
** FIELD OUTPUT: F-Output-1
**
*Output, field, frequency=1
*Node Output
U
*Element Output, directions=YES
S,E,
***Element Output
**SDV
*Output, history
*Node Output, nset=Set-right
RF1, U1
*End Step
***************************************************************
** STEP: Step-2
**
*Step, name=Step-2, nlgeom=YES, extrapolation=NO, inc=200000
***Static, direct
*Static, direct=NO STOP
0.5, 1.,
**
** OUTPUT REQUESTS
**
*Restart, write, frequency=0
**
** FIELD OUTPUT: F-Output-1
**
*Output, field, frequency=1
*Node Output
U
*Element Output, directions=YES
S,E,
***Element Output
**SDV
*Output, history
*Node Output, nset=Set-right
RF1, U1
*End Step
***************************************************************
** STEP: Step-3
**
*Step, name=Step-3, nlgeom=YES, extrapolation=NO, inc=200000
***Static, direct
*Static, direct=NO STOP
0.5, 1.,
** BOUNDARY CONDITIONS
**
*Boundary
Set-interface, 4, 4, 0.0
**
** OUTPUT REQUESTS
**
*Restart, write, frequency=0
**
** FIELD OUTPUT: F-Output-1
**
*Output, field, frequency=1
*Node Output
U
*Element Output, directions=YES
S,E,
***Element Output
**SDV
*Output, history
*Node Output, nset=Set-right
RF1, U1
*End Step
***************************************************************
** STEP: Step-4
**
*Step, name=Step-4, nlgeom=YES, extrapolation=NO, inc=200000
***Static, direct
*Static, direct=NO STOP
0.5, 1.,
**
** OUTPUT REQUESTS
**
*Restart, write, frequency=0
**
** FIELD OUTPUT: F-Output-1
**
*Output, field, frequency=1
*Node Output
U
*Element Output, directions=YES
S,E,
***Element Output
**SDV
*Output, history
*Node Output, nset=Set-right
RF1, U1
*End Step
***************************************************************
** STEP: Step-5
**
*Step, name=Step-5, nlgeom=YES, extrapolation=NO, inc=200000
***Static, direct
*Static
0.01, 1.,0.0000001,0.01
** BOUNDARY CONDITIONS
**
*Boundary, op=NEW
*Boundary, op=NEW
Set-left, 1, 1
**Set-left, 2, 2
*Boundary, op=NEW
Set-leftdown, 2, 2
** Name: BC-2 Type: Displacement/Rotation
*Boundary, op=NEW
**Set-right, 1, 1, 0.02
Set-right, 1, 1, 0.004
** CONTROLS
**
*Controls, reset
*Controls, parameters=time incrementation
5000, 5000, , 5000, 5000, , , 10, , ,
**
** OUTPUT REQUESTS
**
*Restart, write, frequency=0
**
** FIELD OUTPUT: F-Output-1
**
*Output, field, frequency=10
*Node Output
U
*Element Output, directions=YES
S,E,
*Element Output
SDV
*Output, history
*Node Output, nset=Set-right
RF1, U1
*End Step
***************************************************************
** STEP: Step-6
**
*Step, name=Step-6, nlgeom=YES, extrapolation=NO, inc=200000
***Static, direct
*Static
0.002, 1.,0.0000001,0.002
** BOUNDARY CONDITIONS
**
*Boundary, op=NEW
*Boundary, op=NEW
Set-left, 1, 1
**Set-left, 2, 2
*Boundary, op=NEW
Set-leftdown, 2, 2
** Name: BC-2 Type: Displacement/Rotation
*Boundary, op=NEW
**Set-right, 1, 1, 0.02
Set-right, 1, 1, 0.012
** CONTROLS
**
*Controls, reset
*Controls, parameters=time incrementation
5000, 5000, , 5000, 5000, , , 10, , ,
**
** OUTPUT REQUESTS
**
*Restart, write, frequency=0
**
** FIELD OUTPUT: F-Output-1
**
*Output, field, frequency=10
*Node Output
U
*Element Output, directions=YES
S,E,
*Element Output
SDV
*Output, history
*Node Output, nset=Set-right
RF1, U1
*End Step
