*Heading
** Job name: Job-1 Model name: Model-1
** Generated by: Abaqus/CAE 2020.HF1
*Preprint, echo=NO, model=NO, history=NO, contact=NO
**
** PARTS
**
*Part, name=Part-1
*Node
      1,  -7.50007629, -0.400000006
      2,  -7.50007629,         -0.5
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*Element, type=CPE4
   1,    1,   31, 4982, 1242
   2,   31,   32, 4983, 4982
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*Nset, nset=matrix
     23,     24,     28,     29,     30,   3901
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*Elset, elset=matrix, generate
  32001,  108800,       1
*Nset, nset=coating, generate
     1,  32841,      1
*Elset, elset=coating, generate
     1,  32000,      1
** Section: Section-2
*Solid Section, elset=coating, material=coating
1.0,
** Section: Section-1
*Solid Section, elset=matrix, material=matrix
1.0,
***************************************************************
*User element, nodes=4, type=U1, properties=3, coordinates=2, Variables=12
4
*Element, type=U1, elset=Phase-coating
10000001,1,31,4982,1242
10000002,31,32,4983,4982
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*Uel property, elset=Phase-coating
0.0375, 15.0E-3, 1.0
*End Part
**
**
** ASSEMBLY
**
*Assembly, name=Assembly
**
*Instance, name=Part-1-1, part=Part-1
*End Instance
**
*Nset, nset=Set-down, instance=Part-1-1
 8,
*Nset, nset=Set-interface, instance=Part-1-1
   23,   24,   28,   29,   30, 3901
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*Elset, elset=Set-interface, instance=Part-1-1
  27881,  27882,  27883,  27884,  27885,  27886
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*Nset, nset=Set-nodamage, instance=Part-1-1
     1,     2,     6,     7,     8,     9
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*Elset, elset=Set-nodamage, instance=Part-1-1
  9601,  9602,  9603,  9604,  9605,  9606
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*Nset, nset=Set-right, instance=Part-1-1
     3,     4,     5,    13,    18,    23
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*Elset, elset=Set-right, instance=Part-1-1
  4793,  4794,  4795,  4796,  4797,  4798
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*Nset, nset=Set-up, instance=Part-1-1
 33722,
*End Assembly
**
*** MATERIALS
**
*Material, name=matrix
*Elastic
200000., 0.3,
*Plastic
   800.,0.
20800.,1.
*Material, name=coating
*Depvar
     22,
*User Material, constants=1
1.0,
**Boundary
**Set-interface, 6, 6
**
***************************************************************
***************************************************************
** STEP: Step-1
**
*Step, name=Step-1, nlgeom=YES, extrapolation=NO, inc=200000
***Static, direct
*Static, direct=NO STOP
1., 1.,
** BOUNDARY CONDITIONS
**
*Boundary
Set-interface, 4, 4, 1.0
**
** OUTPUT REQUESTS
**
*Restart, write, frequency=0
**
** FIELD OUTPUT: F-Output-1
**
*Output, field, frequency=1
*Node Output
U
*Element Output, directions=YES
S,E,
*Element Output
SDV
*Output, history
*End Step
***************************************************************
** STEP: Step-2
**
*Step, name=Step-2, nlgeom=YES, extrapolation=NO, inc=200000
***Static, direct
*Static, direct=NO STOP
0.5, 1.,
** BOUNDARY CONDITIONS
**
**
** OUTPUT REQUESTS
**
*Restart, write, frequency=0
**
** FIELD OUTPUT: F-Output-1
**
*Output, field, frequency=1
*Node Output
U
*Element Output, directions=YES
S,E,
*Element Output
SDV
*Output, history
*End Step
***************************************************************
** STEP: Step-3
**
*Step, name=Step-3, nlgeom=YES, extrapolation=NO, inc=200000
***Static, direct
*Static, direct=NO STOP
0.5, 1.,
** BOUNDARY CONDITIONS
**
*Boundary
Set-interface, 4, 4, 0.0
**
** OUTPUT REQUESTS
**
*Restart, write, frequency=0
**
** FIELD OUTPUT: F-Output-1
**
*Output, field, frequency=1
*Node Output
U
*Element Output, directions=YES
S,E,
*Element Output
SDV
*Output, history
*End Step
***************************************************************
** STEP: Step-4
**
*Step, name=Step-4, nlgeom=YES, extrapolation=NO, inc=200000
***Static, direct
*Static, direct=NO STOP
0.5, 1.,
** BOUNDARY CONDITIONS
**
**
** OUTPUT REQUESTS
**
*Restart, write, frequency=0
**
** FIELD OUTPUT: F-Output-1
**
*Output, field, frequency=1
*Node Output
U
*Element Output, directions=YES
S,E,
*Element Output
SDV
*Output, history
*End Step
***************************************************************
** STEP: Step-5
**
*Step, name=Step-5, nlgeom=YES, extrapolation=NO, inc=200000
***Static, direct
*Static, direct=NO STOP
0.001, 1.,0.00000002, 0.001
***Static, direct=NO STOP
**0.001, 1.,
** BOUNDARY CONDITIONS
**
*Boundary, op=NEW
** Name: BC-1 Type: Displacement/Rotation
*Boundary, op=NEW
Set-down, 2, 2
** Name: BC-2 Type: Displacement/Rotation
*Boundary, op=NEW
Set-up, 2, 2, -0.2
** Name: BC-3 Type: Displacement/Rotation
*Boundary, op=NEW
Set-right, 1, 1
*Boundary, op=NEW
**Set-Nodamage, 4, 4
Set-nodamage, 4, 4
** CONTROLS
**
*Controls, reset
*Controls, parameters=time incrementation
5000, 5000, , 5000, 5000, , , 10, , ,
**
** OUTPUT REQUESTS
**
*Restart, write, frequency=0
**
** FIELD OUTPUT: F-Output-1
**
*Output, field, frequency=20
*Node Output
U
*Element Output, directions=YES
S,E,
*Element Output
SDV
*Output, history
*Node Output, nset=Set-up
RF2, U2
*End Step
***************************************************************
** STEP: Step-6
**
*Step, name=Step-6, nlgeom=YES, extrapolation=NO, inc=200000
***Static, direct
***Static, direct=NO STOP
**0.002, 1.,0.00002, 0.002
*Static, direct=NO STOP
0.001, 1.,0.0000002, 0.001
** BOUNDARY CONDITIONS
**
*Boundary, op=NEW
** Name: BC-1 Type: Displacement/Rotation
*Boundary, op=NEW
Set-down, 2, 2
** Name: BC-2 Type: Displacement/Rotation
*Boundary, op=NEW
Set-up, 2, 2, -0.4
** Name: BC-3 Type: Displacement/Rotation
*Boundary, op=NEW
Set-right, 1, 1
*Boundary, op=NEW
Set-nodamage, 4, 4
** CONTROLS
**
*Controls, reset
*Controls, parameters=time incrementation
5000, 5000, , 5000, 5000, , , 10, , ,
**
** OUTPUT REQUESTS
**
*Restart, write, frequency=0
**
** FIELD OUTPUT: F-Output-1
**
*Output, field, frequency=40
*Node Output
U
*Element Output, directions=YES
S,E,
*Element Output
SDV
*Output, history
*Node Output, nset=Set-up
RF2, U2
*End Step
